*Heading
** Job name: TUBA3_TEST Model name: Model-1
** Generated by: Abaqus/CAE 6.14-1
*Preprint, echo=NO, model=NO, history=NO, contact=NO
**
** PARTS
**
*Part, name=Part-1
*Node
      1,          10.,           0.,           0.
      2,           0.,          15.,           0.
      3,         -10.,           0.,           0.
*USER ELEMENT, TYPE=U303, NODES=3, COORDINATES=3, VARIABLES=8
3, 4, 5, 11, 12, 13
*Element, type=U303, ELSET=plate
1, 1, 2, 3
*UEL PROPERTY, ELSET=plate
139.4E3, 0.3, 1.5
*End Part
**
**
** ASSEMBLY
**
*Assembly, name=Assembly
**
*Instance, name=Part-1-1, part=Part-1
*End Instance
**
*Nset, nset=_PickedSet4, internal, instance=Part-1-1
 1, 3
*Elset, elset=_PickedSet4, internal, instance=Part-1-1
 1,
*Nset, nset=_PickedSet5, internal, instance=Part-1-1
 2,
*End Assembly
**
** BOUNDARY CONDITIONS
**
** Name: BC-1 Type: Displacement/Rotation
*Boundary
_PickedSet4, 1, 1
_PickedSet4, 2, 2
_PickedSet4, 3, 3
_PickedSet4, 4, 4
_PickedSet4, 5, 5
_PickedSet4, 6, 6
** Name: BC-2 Type: Displacement/Rotation
*Boundary
_PickedSet5, 1, 1
_PickedSet5, 3, 3
_PickedSet5, 4, 4
_PickedSet5, 5, 5
_PickedSet5, 6, 6
** ----------------------------------------------------------------
**
** STEP: Step-1
**
*Step, name=Step-1, nlgeom=NO
*Static
0.01, 1., 1e-05, 1.
**
** BOUNDARY CONDITIONS
**
** Name: BC-2 Type: Displacement/Rotation
*Boundary
_PickedSet5, 2, 2, 2.
**
** OUTPUT REQUESTS
**
*Restart, write, frequency=0
**
** FIELD OUTPUT: F-Output-1
**
*Output, field, variable=PRESELECT
**
** HISTORY OUTPUT: H-Output-1
**
*Output, history, variable=PRESELECT
*End Step
